<?xml version="1.0"?>
<!-- Generated by Aero-Matic v 1.1

     Inputs:
                horsepower: 1140.0
                     pitch: variable
            max engine rpm: 2300
        prop diameter (ft): 9.843

     Outputs:
              max prop rpm: 1906.23
                gear ratio:    1.21
                       Cp0: 0.088991
                       Ct0: 0.207350
       static thrust (lbs): 4671.67
Propeller: VDM 9-11131 V1  3 blade propeller (with electrical manual variable pitch)
Diameter: 3.0m
-->

<propeller name="prop">
  <ixx>  28.45 </ixx>
  <diameter unit="M"> 3 </diameter>
  <numblades> 3 </numblades>
  <gearratio>  1.5 </gearratio>
  <minpitch> 23 </minpitch>
  <maxpitch> 48 </maxpitch>
  <ct_factor> 1.0 </ct_factor>
  <cp_factor> 1.0 </cp_factor>

  <constspeed>0</constspeed>

 <!-- thrust coefficient as a function of advance ratio and blade angle -->
  <table name="C_THRUST" type="internal">
      <tableData>
                -10        0         15        25        35        45        55        65       90
      -0.2      -0.1012    0.0570    0.2063    0.2540    0.2799    0.2955    0.2723    0.2333   0.0000
       0.0      -0.1503    0.0000    0.2063    0.2540    0.2799    0.2982    0.2787    0.2333   0.0000
       0.2      -0.1686   -0.0518    0.1779    0.2488    0.2760    0.2982    0.2787    0.2333   0.0000
       0.4      -0.1686   -0.1205    0.1338    0.2463    0.2708    0.2955    0.2787    0.2333   0.0000
       0.6      -0.1686   -0.1686    0.0703    0.2217    0.2592    0.2878    0.2747    0.2333   0.0000
       0.8      -0.1686   -0.1686    0.0029    0.1659    0.2515    0.2774    0.2747    0.2333   0.0000
       1.0      -0.1686   -0.1686   -0.0674    0.1012    0.2411    0.2631    0.2723    0.2333   0.0000
       1.2      -0.1686   -0.1686   -0.1387    0.0311    0.1982    0.2540    0.2723    0.2333   0.0000
       1.4      -0.1686   -0.1686   -0.1686   -0.0454    0.1427    0.2501    0.2671    0.2333   0.0000
       1.6      -0.1686   -0.1686   -0.1686   -0.1153    0.0778    0.2411    0.2619    0.2333   0.0000
       1.8      -0.1686   -0.1686   -0.1686   -0.1686    0.0131    0.2073    0.2540    0.2333   0.0000
       2.0      -0.1686   -0.1686   -0.1686   -0.1686   -0.0518    0.1619    0.2530    0.2333   0.0000
       2.2      -0.1686   -0.1686   -0.1686   -0.1686   -0.1167    0.1167    0.2488    0.2333   0.0000
       2.4      -0.1686   -0.1686   -0.1686   -0.1686   -0.1686    0.0622    0.2032    0.2333   0.0000
       2.6      -0.1686   -0.1686   -0.1686   -0.1686   -0.1686    0.0079    0.1286    0.2073   0.0000
       2.8      -0.1686   -0.1686   -0.1686   -0.1686   -0.1686   -0.0467    0.0842    0.1686   0.0000
       3.0      -0.1686   -0.1686   -0.1686   -0.1686   -0.1686   -0.1012    0.0442    0.1296   0.0000
       3.2      -0.1686   -0.1686   -0.1686   -0.1686   -0.1686   -0.1555    0.0039    0.0908   0.0000
       3.4      -0.1686   -0.1686   -0.1686   -0.1686   -0.1686   -0.1686   -0.0363    0.0518   0.0000
       3.6      -0.1686   -0.1686   -0.1686   -0.1686   -0.1686   -0.1686   -0.0765    0.0131   0.0000
       3.8      -0.1686   -0.1686   -0.1686   -0.1686   -0.1686   -0.1686   -0.1167   -0.0259   0.0000
       4.0      -0.1686   -0.1686   -0.1686   -0.1686   -0.1686   -0.1686   -0.1568   -0.0649   0.0000
       6.0      -0.1686   -0.1686   -0.1686   -0.1686   -0.1686   -0.1686   -0.1686   -0.1686   0.0000
      </tableData>
  </table>

 <!-- power coefficient as a function of advance ratio and blade angle -->
  <table name="C_POWER" type="internal">
     <tableData>
               -10        0        15        25        35        45        55        65       90
      -0.2      0.0149   0.0296    0.1039    0.2358    0.4067    0.5784    0.6674    0.7386   0.7386
       0.0      0.0594   0.0149    0.0890    0.2198    0.3889    0.5784    0.6701    0.7386   0.7386
       0.2      0.0845   0.0238    0.0861    0.2047    0.3720    0.5784    0.6701    0.7386   0.7386
       0.4      0.1139   0.0519    0.0741    0.1887    0.3533    0.5784    0.6701    0.7386   0.7386
       0.6      0.1397   0.0786    0.0489    0.1753    0.3310    0.5669    0.6674    0.7386   0.7386
       0.8      0.1646   0.1053    0.0149    0.1486    0.3115    0.5411    0.6674    0.7386   0.7386
       1.0      0.1896   0.1308    0.0149    0.1041    0.2937    0.5135    0.6648    0.7386   0.7386
       1.2      0.2154   0.1046   -0.0489    0.0400    0.2599    0.4921    0.6603    0.7386   0.7386
       1.4      0.2403   0.1807   -0.0739   -0.0296    0.2002    0.4850    0.6523    0.7386   0.7386
       1.6      0.2652   0.2065   -0.0863   -0.0890    0.1264    0.4717    0.6381    0.7119   0.7386
       1.8      0.2910   0.2314   -0.0890   -0.1486    0.0371    0.4183    0.6185    0.6968   0.7386
       2.0      0.3159   0.2563   -0.1139   -0.2073   -0.0445    0.3560    0.5891    0.6826   0.7386
       2.2      0.3408   0.2821   -0.1397   -0.2670   -0.1335    0.2892    0.5713    0.6523   0.7386
       2.4      0.3666   0.3070   -0.1646   -0.3266   -0.2225    0.2065    0.5544    0.6381   0.7386
       2.6      0.3916   0.3319   -0.1896   -0.3853   -0.2821    0.0863    0.5411    0.6158   0.7386
       2.8      0.4165   0.3577   -0.2154   -0.4450   -0.3382   -0.0294    0.5295    0.6078   0.7386
       3.0      0.4423   0.3827   -0.2403   -0.5046   -0.4005   -0.1335    0.5117    0.6078   0.7386
       3.2      0.4672   0.4076   -0.2652   -0.5633   -0.4601   -0.2376    0.4788    0.5936   0.7386
       3.4      0.4921   0.4334   -0.2910   -0.6229   -0.5188   -0.3408    0.3711    0.5784   0.7386
       3.6      0.5179   0.4583   -0.3159   -0.6826   -0.5784   -0.4450    0.2607    0.5633   0.7386
       3.8      0.5428   0.4832   -0.3408   -0.7386   -0.6381   -0.5491    0.1451    0.5455   0.7386
       4.0      0.5678   0.5090   -0.3666   -0.7386   -0.7386   -0.6523    0.0294    0.5046   0.7386
       6.0      0.7386   0.7386   -0.7386   -0.7386   -0.7386   -0.7386   -0.7386   -0.4450   0.7386
     </tableData>
  </table>

<!-- thrust effects of helical tip Mach -->
<table name="CT_MACH" type="internal">
  <tableData>
    0.85   1.0
    1.05   0.8
  </tableData>
</table>

<!-- power-required effects of helical tip Mach -->
<table name="CP_MACH" type="internal">
  <tableData>
    0.85   1.0
    1.05   1.8
    2.00   1.4
  </tableData>
</table>

</propeller>
